// COMSOL Multiphysics 6.3.0.290 model "parallel_plate_capacitor.mph"
// Outline of the model tree

Parameters
  ll = 5  // lenght of dielectric
  ww = 0.1  // width of dielectric
  dd = 1  // distance between the paltes
  espp = 4  // pertimity

Geometry
  geom1 "Geometry 1" (2D, length unit cm)
    r1: Rectangle | size = {ll, dd}; base = center
    fin: Finalize "Form Union"

Materials
  mat1: Common "Quartz" on domains 1
    def: def "Basic"
      relpermeability = 1
      electricconductivity = 1e-12[S/m]
      heatcapacity = 820[J/(kg*K)]
      relpermittivity = espp
      emissivity = 0.7
      density = 2600[kg/m^3]
      thermalconductivity = 3[W/(m*K)]

Physics
  es: Electrostatics on all domains
    dependent variable V
    d.d = ww
    fsp1: FreeSpace (default)
    zc1: ZeroCharge (default)
    init1: init "Initial Values 1" (default)
    gnd1: Ground on boundaries 2
    pot1: ElectricPotential (disabled) on boundaries 3 | V0 = 1
    term1: Terminal on boundaries 3 | TerminalType = Voltage; V0 = 20000

Mesh
  mesh1 "Mesh 1" (physics-controlled)
    size: MeshSizeDefault | hauto = 1

Studies
  std1 "Study 1"
    stat: Stationary

Solver configurations
  sol1 "Solution 1" (study std1)
    v1: Variables "Dependent Variables 1"
    s1: Stationary "Stationary Solver 1"
      dDef: Direct
      fc1: FullyCoupled

Datasets
  dset1: Solution | solution = sol1
  cln1: CutLine2D | data = dset1; genpoints = {{0, -0.5}, {0, 0.5}}

Derived values
  gev1: EvalGlobal "Global Evaluation 1"
    data = dset1
    table = tbl1
    expr = {es.intWe, es.Q0_1, es.Q0_1}
    descr = {Total electric energy, Terminal charge, Terminal charge}

Tables
  tbl1: Table
    // Global Evaluation 1
    Total electric energy (J) | Total electric energy (J) | Terminal charge (C) | Terminal charge (C)
    2.21355e-12 | 2.21355e-12 | 4.42709e-12 | 4.42709e-12

Plots
  pg1: PlotGroup2D "Electric Potential (es)" | data = dset1
    surf1: Surface | data = dset1; expr = V
    str1: Streamline | expr = {es.Ex, es.Ey}; udist = 0.02; maxsteps = 5000
      col1: Color "Color Expression 1" | expr = V
      filt1: Filter | expr = !isScalingSystemDomain
    arws1: ArrowSurface (disabled) | expr = {es.Ex, es.Ey}; ynumber = 5
    con1: Contour (disabled) | expr = V
  pg2: PlotGroup2D "Electric Field (es)" | data = cln1
    surf1: Surface | data = dset1; expr = es.normE; unit = V/m
    str1: Streamline on boundaries 1-4 | expr = {es.Ex, es.Ey}; udist = 0.02; maxsteps = 5000
      col1: Color "Color Expression 1" | expr = es.normE
      filt1: Filter | expr = !isScalingSystemDomain